// SBML level 2 version 3

model V1_V_VR()

  // Compartments:
  compartment mycell = 1;

  // Species:
  species S1 in mycell = 1; S1 is "V()";
  species S2 in mycell = 1; S2 is "cell()";
  species S3 in mycell = 0; S3 is "U()";
  species S4 in mycell = 0; S4 is "R()";
  species S5 in mycell = 0; S5 is "P()";
  species S6 in mycell = 0; S6 is "A()";
  species S7 in mycell = 0; S7 is "E()";

  // Parameters:
  TIME_CONV = 60;
  max_infected_half_max = 500;
  apoptosis_hill = 1;
  virus_fraction_released_at_death = 0;
  r_uncoat = 0.01*TIME_CONV;
  r_prep = 0.01*TIME_CONV;
  lambda_R = 0*TIME_CONV;
  lambda_P = 0*TIME_CONV;
  r_synth = 0.01*TIME_CONV;
  r_assemble = 0.01*TIME_CONV;
  r_exo = 0.01*TIME_CONV;
  max_infected_apoptosis_rate = 0.001*TIME_CONV;

  // Assignment rules:
  V := 0 + S1;
  U := 0 + S3;
  R := 0 + S4;
  P := 0 + S5;
  A := 0 + S6;
  E := 0 + S7;
  cell := 0 + S2;
  infected_apoptosis_rate := max_infected_apoptosis_rate*(A^apoptosis_hill/(A^apoptosis_hill + max_infected_half_max^apoptosis_hill));
  vout_day := cell*r_exo*A*24;
  dead_cell_release := virus_fraction_released_at_death*infected_apoptosis_rate;

  // Reactions:
  R1: S1 => S3; r_uncoat*S1;
  R2: S2 => ; infected_apoptosis_rate*S2;
  R3: S3 => S4; r_prep*S3;
  R4: S4 => ; lambda_R*S4;
  R5: S4 => S4 + S5; r_synth*S4;
  R6: S5 => ; lambda_P*S5;
  R7: S5 => S6; r_assemble*S5;
  R8: S6 => S7; r_exo*S6;
  R9: S6 => S7; dead_cell_release*S6;
end
