// SBML level 2 version 3

model V4_RT_V_VR()

  // Compartments:
  compartment cell = 1;

  // Species:
  species S1 in cell = 10; S1 is "nV()";
  species R_EU in cell = 10000; R_EU is "R_EU()";
  species S3 in cell = 1; S3 is "Cell()";
  species S4 in cell = 1; S4 is "E()";
  species S5 in cell = 0; S5 is "R_EB()";
  species R_IB in cell = 0; R_IB is "R_IB()";
  species R_IU in cell = 0; R_IU is "R_IU()";
  species S8 in cell = 0; S8 is "V()";
  species S9 in cell = 0; S9 is "U()";
  species S10 in cell = 0; S10 is "R()";
  species S11 in cell = 0; S11 is "P()";
  species S12 in cell = 0; S12 is "A()";

  // Parameters:
  TIME_CONV = 60;
  ACE2_0 = 10000;
  r_rep_half = 200;
  max_infected_half_max = 250;
  apoptosis_hill = 1;
  virus_fraction_released_at_death = 0;
  r_bind = 0.01*TIME_CONV;
  r_endo = 0.01*TIME_CONV;
  r_release = 0.01*TIME_CONV;
  r_recycle = 0.01*TIME_CONV;
  r_uncoat = 0.01*TIME_CONV;
  r_prep = 0.01*TIME_CONV;
  r_synth = 0.01*TIME_CONV;
  r_rep_max = 3*TIME_CONV;
  r_rna_deg = 0.01*TIME_CONV;
  r_assemble = 0.01*TIME_CONV;
  r_exo = 0.01*TIME_CONV;
  max_infected_apoptosis_rate = 0.002*TIME_CONV;

  // Assignment rules:
  nV := 0 + S1;
  R_EB := 0 + S5;
  V := 0 + S8;
  U := 0 + S9;
  R := 0 + S10;
  P := 0 + S11;
  A := 0 + S12;
  E := 0 + S4;
  Cell := 0 + S3;
  infected_apoptosis_rate := max_infected_apoptosis_rate*(A^apoptosis_hill/(A^apoptosis_hill + max_infected_half_max^apoptosis_hill));
  rna_rep_rate := r_rep_max/(R + r_rep_half);
  virus_export_rate := Cell*r_exo;
  vout_day := Cell*r_exo*A*24;
  dead_cell_release := virus_fraction_released_at_death*infected_apoptosis_rate;

  // Reactions:
  R1: S1 + R_EU => S5; r_bind*S1*R_EU;
  R2: S3 => ; infected_apoptosis_rate*S3;
  R3: S5 => R_IB; r_endo*S5;
  R4: R_IB => R_IU + S8; r_release*R_IB;
  R5: R_IU => R_EU; r_recycle*R_IU;
  R6: S8 => S9; r_uncoat*S8;
  R7: S9 => S10; r_prep*S9;
  R8: S10 => S10 + S11; r_synth*S10;
  R9: S10 => S10 + S10; rna_rep_rate*S10;
  R10: S10 => ; r_rna_deg*S10;
  R11: S11 => S12; r_assemble*S11;
  R12: S12 => S4; virus_export_rate*S12;
  R13: S12 => S4; dead_cell_release*S12;
end
